// SBML level 3 version 1

function MM(km, Vmax, S)
  Vmax*S/(km + S);
end

function MMWithKcat(km, kcat, S, E)
  kcat*E*S/(km + S);
end

function NonCompetitiveInhibition(km, ki, Vmax, n, I, S)
  Vmax*S/((km + S)*(1 + (I/ki)^n));
end

function NonCompetitiveInhibitionWithKcat(km, ki, kcat, E, n, I, S)
  kcat*E*S/((km + S)*(1 + (I/ki)^n));
end

function NonCompetitiveInhibitionWithKcatAndExtraActivator(km, ki, kcat, E1, E2, n, I, S)
  kcat*E1*E2*S/((km + S)*(1 + (I/ki)^n));
end

function MA1(k, S)
  k*S;
end

function MA2(k, S1, S2)
  k*S1*S2;
end

function MA1Mod(k, S, M)
  k*S*M;
end

function MA2Mod(k, S1, S2, M)
  k*S1*S2*M;
end

function CompetitiveInhibitionWithKcat(km, ki, kcat, E, I, S)
  kcat*E*S/(km + S + km*I/ki);
end

function CompetitiveInhibition(Vmax, km, ki, I, S)
  Vmax*S/(km + S + km*I/ki);
end

function Hill(km, kcat, E, S, h)
  kcat*E*(S/km)^h/(1 + (S/km)^h);
end

model ComplexPI3KModel()

  // Compartments:
  compartment default_compartment = 1;
  compartment Cell = 1;

  // Species:
  species IRS1 in Cell = 10.001;
  species IRS1a in Cell = 0;
  species pIRS1 in Cell = 0;
  species PI3K in Cell = 10.001;
  species pPI3K in Cell = 0;
  species PIP2 in Cell = 100.001;
  species PIP3 in Cell = 0;
  species PDK1 in Cell = 10.001;
  species PDK1_PIP3 in Cell = 0;
  species Akt in Cell = 10.001;
  species Akt_PIP3 in Cell = 0;
  species pAkt in Cell = 0;
  species Akti in Cell = 0;
  species TSC2 in Cell = 10.001;
  species pTSC2 in Cell = 0;
  species RhebGDP in Cell = 10.002;
  species RhebGTP in Cell = 0;
  species ppPras40 in Cell = 0;
  species mTORC1cyt in Cell = 0;
  species mTORC1_Pras40cyt in Cell = 10.001;
  species mTORC1lys in Cell = 0;
  species RAG_GDP in Cell = 10.001;
  species RAG_GTP in Cell = 0;
  species mTORC1i in Cell = 0;
  species mTORC1ii in Cell = 0;
  species mTORC1iii in Cell = 0;
  species mTORC1iv in Cell = 0;
  species FourEBP1 in Cell = 10.001;
  species pFourEBP1 in Cell = 0;
  species S6K in Cell = 10.001;
  species pS6K in Cell = 0;
  species AMPK in Cell = 10.001;
  species PKC in Cell = 10.001;
  species pAMPKi in Cell = 0;
  species pAMPK in Cell = 0;
  species CaMKK2a in Cell = 0;
  species CaMKK2 in Cell = 10.001;
  species LKB1a in Cell = 0;
  species LKB1 in Cell = 10.001;
  species RTK in Cell = 10.001;
  species pRTK in Cell = 0;
  species Sos in Cell = 10.001;
  species pRTKa in Cell = 0;
  species Raf in Cell = 10.001;
  species pRaf in Cell = 0;
  species Mek in Cell = 10.001;
  species pMek in Cell = 0;
  species Erk in Cell = 10.001;
  species pErk in Cell = 0;
  species Meki in Cell = 0;
  species PLCeps in Cell = 10.001;
  species pPLCeps in Cell = 0;
  species IP3 in Cell = 0;
  species DAG in Cell = 0;
  species IpR in Cell = 10.001;
  species IpRa in Cell = 0;
  species Ca2 in Cell = 0;
  species DUSPmRNA in Cell = 0;
  species DUSP in Cell = 0;
  species $Rapamycin in default_compartment = 0;
  species $MK2206 in default_compartment = 0;
  species $Wortmannin in default_compartment = 0;
  species PI3Ki in default_compartment = 0;
  species RasGDP in default_compartment = 10.002;
  species RasGTP in default_compartment = 0;
  species pmTORC1 in default_compartment = 0;
  species PKCa in default_compartment = 0;
  species pSos in default_compartment = 0;

  // Parameters:
  PTEN = 1;
  AMP = 0;
  ATP = 10;
  ADP = 0;
  Insulin = 0;
  AA = 0;
  AZD = 0;
  EGF = 0;
  PMA = 0;
  kIRS1In = 1;
  kIRS1Out = 0.1;
  kIRS1Act = 0.1;
  kIRS1Inact = 0.1;
  kIRS1Phos = 0.1;
  kIRS1Dephos = 0.1;
  kPI3KPhosByIRS = 0.1;
  kPI3KDephos = 0.1;
  kPI3KPhosByRas = 0.01;
  kPI3KBindWort = 100;
  kPI3KUnbindWort = 0.1;
  kPIPPhos = 0.1;
  kPIPDephos = 0.1;
  kPDK1BindPIP3 = 0.01;
  kPDK1UnbindPIP3 = 0.1;
  kAktBindPIP3 = 0.1;
  kAktUnbindPIP3 = 0.1;
  kAktPhos = 0.1;
  kAktDephos = 0.1;
  kAktBindMK = 0.1;
  kTSC2Phos = 0.1;
  kTSC2Dephos = 0.1;
  kRhebPhos = 0.1;
  kRhebDephos = 0.1;
  kmTORC1BindPras40 = 0.1;
  kmTORC1UnbindPras40 = 0.1;
  kmTORC1CytToLys = 0.1;
  kmTORC1LysToCyt = 0.1;
  kRAGPhos = 0.1;
  kRAGDephos = 0.1;
  kmTORC1Phos = 0.1;
  kmTORC1Dephos = 0.1;
  kmTORC1BindRapa = 0.1;
  kmTORC1UnbindRapa = 0.1;
  k4EBP1Phos = 0.1;
  k4EBP1Dephos = 0.1;
  kS6KPhos = 0.1;
  kS6KDehos = 0.1;
  kAMPKInhibPhosByAkt = 0.1;
  kAMPKInhibPhosByS6K = 0.1;
  kAMPKDephos = 0.1;
  kAMPKActByCaMKK2 = 0.1;
  kAMPKActByLKB1 = 0.1;
  kAMPKInact = 0.1;
  kCaMKK2Act = 0.1;
  kCaMKK2Inact = 0.1;
  kAMPPhos = 0.1;
  kADPDephos = 0.1;
  kADPPhos = 0.1;
  kATPDephos = 0.1;
  kPKCAct = 0.1;
  kPKCActByPMA = 0.2;
  kPKCInact = 0.1;
  kLKB1Act = 0.1;
  kLKB1Inact = 0.1;
  kTKRBindEGF = 0.1;
  kTKRUnbindEGF = 0.1;
  kTKRBindSOS = 0.1;
  kTKRUnbindSOS = 0.1;
  kSOSPhos = 1;
  kSOSDephos = 0.1;
  kRasLoadByRTK = 0.1;
  kRasLoadByPKC = 0.1;
  kRasUnload = 0.1;
  kRafPhos = 0.1;
  kRafDephos = 0.1;
  kRafDephosByAkt = 0.1;
  kMekPhos = 0.1;
  kMekDephos = 0.1;
  kErkPhos = 0.01;
  kErkDephos = 0.1;
  kMekBindAzd = 0.1;
  kMekUnbindAzd = 0.1;
  kPLCPhos = 0.1;
  kPLCDephos = 0.1;
  kPLCPhosBasal = 0.005;
  kPIP2Break = 0.001;
  kPIP2form = 0.1;
  kIP3BindIpR = 0.1;
  kIP3UnbindIpR = 0.1;
  kCa2In = 0.1;
  kCa2Out = 0.1;
  kDUSPmRNAIn = 0.001;
  kDUSPmRNAOut = 0.1;
  kDUSPIn = 0.1;
  kDUSPOut = 0.01;

  // Reactions:
  R1In: => IRS1; Cell*kIRS1In;
  R2Out: IRS1 => ; Cell*kIRS1Out*IRS1;
  R1f: IRS1 => IRS1a; Cell*kIRS1Act*IRS1*Insulin;
  R1b: IRS1a => IRS1; Cell*kIRS1Inact*IRS1a;
  R1i: IRS1a => pIRS1; Cell*kIRS1Phos*IRS1a*pS6K;  // modifiers: pS6K
  R1Out2: pIRS1 => ; Cell*kIRS1Dephos*pIRS1;
  R2fi: PI3K => pPI3K; Cell*kPI3KPhosByIRS*PI3K*IRS1a;  // modifiers: IRS1a
  R2bi: pPI3K => PI3K; Cell*kPI3KDephos*pPI3K;
  R2if: PI3K + $Wortmannin => PI3Ki; Cell*kPI3KBindWort*PI3K*Wortmannin;
  R2ib: PI3Ki => PI3K + $Wortmannin; Cell*kPI3KUnbindWort*PI3Ki;
  R2fii: PI3K => pPI3K; Cell*kPI3KPhosByRas*PI3K*RasGTP;  // modifiers: RasGTP
  R3f: PIP2 => PIP3; Cell*kPIPPhos*PIP2*pPI3K;  // modifiers: pPI3K
  R3b: PIP3 => PIP2; Cell*kPIPDephos*PIP3*PTEN;
  R4f: PIP3 + PDK1 => PDK1_PIP3; Cell*kPDK1BindPIP3*PIP3*PDK1;
  R4b: PDK1_PIP3 => PIP3 + PDK1; Cell*kPDK1UnbindPIP3*PDK1_PIP3;
  R5f: PIP3 + Akt => Akt_PIP3; Cell*kAktBindPIP3*PIP3*Akt;
  R5b: Akt_PIP3 => PIP3 + Akt; Cell*kAktUnbindPIP3*Akt_PIP3;
  R6f: Akt_PIP3 => pAkt; Cell*kAktPhos*Akt_PIP3*PDK1_PIP3;  // modifiers: PDK1_PIP3
  R6b: pAkt => Akt_PIP3; Cell*kAktDephos*pAkt;
  R6i: Akt + $MK2206 => Akti; Cell*kAktBindMK*Akt*MK2206;
  R7f: TSC2 => pTSC2; Cell*kTSC2Phos*TSC2*pAkt;  // modifiers: pAkt
  R7b: pTSC2 => TSC2; Cell*kTSC2Dephos*pTSC2;
  R8f: RhebGDP => RhebGTP; Cell*kRhebPhos*RhebGDP*AA;
  R8b: RhebGTP => RhebGDP; Cell*kRhebDephos*RhebGTP*TSC2;  // modifiers: TSC2
  R9f: ppPras40 + mTORC1cyt => mTORC1_Pras40cyt; Cell*kmTORC1BindPras40*ppPras40*mTORC1cyt;
  R9b: mTORC1_Pras40cyt => ppPras40 + mTORC1cyt; Cell*kmTORC1UnbindPras40*mTORC1_Pras40cyt*pAkt;  // modifiers: pAkt
  R10f: mTORC1cyt + RAG_GTP => mTORC1lys + RAG_GDP; Cell*kmTORC1CytToLys*mTORC1cyt*RAG_GTP;
  R10b: mTORC1lys => mTORC1cyt; Cell*kmTORC1LysToCyt*mTORC1lys;
  R11f: RAG_GDP => RAG_GTP; Cell*kRAGPhos*RAG_GDP*AA;
  R11b: RAG_GTP => RAG_GDP; Cell*kRAGDephos*RAG_GTP;
  R12f: mTORC1lys + RhebGTP => pmTORC1 + RhebGDP; Cell*kmTORC1Phos*mTORC1lys*RhebGTP;
  R12b: pmTORC1 => mTORC1lys; Cell*kmTORC1Dephos*pmTORC1*AMPK;  // modifiers: AMPK
  R13fi: mTORC1cyt + $Rapamycin => mTORC1i; Cell*kmTORC1BindRapa*mTORC1cyt*Rapamycin;
  R13bi: mTORC1i => mTORC1cyt + $Rapamycin; Cell*kmTORC1UnbindRapa*mTORC1i;
  R13fii: mTORC1lys + $Rapamycin => mTORC1ii; Cell*kmTORC1BindRapa*mTORC1lys*Rapamycin;
  R13bii: mTORC1ii => mTORC1lys + $Rapamycin; Cell*kmTORC1UnbindRapa*mTORC1ii;
  R13fiii: pmTORC1 + $Rapamycin => mTORC1iii; Cell*kmTORC1BindRapa*pmTORC1*Rapamycin;
  R13biii: mTORC1iii => pmTORC1 + $Rapamycin; Cell*kmTORC1UnbindRapa*mTORC1iii;
  R13fiv: mTORC1_Pras40cyt + $Rapamycin => mTORC1iv; Cell*kmTORC1BindRapa*mTORC1_Pras40cyt*Rapamycin;
  R13biv: mTORC1iv => mTORC1_Pras40cyt + $Rapamycin; Cell*kmTORC1UnbindRapa*mTORC1iv;
  R14f: FourEBP1 => pFourEBP1; Cell*k4EBP1Phos*FourEBP1*pmTORC1;  // modifiers: pmTORC1
  R14b: pFourEBP1 => FourEBP1; Cell*k4EBP1Dephos*pFourEBP1;
  R15f: S6K => pS6K; Cell*kS6KPhos*S6K*pmTORC1;  // modifiers: pmTORC1
  R15b: pS6K => S6K; Cell*kS6KDehos*pS6K;
  R16fi: AMPK => pAMPKi; Cell*kAMPKInhibPhosByAkt*AMPK*pAkt;  // modifiers: pAkt
  R16fii: AMPK => pAMPKi; Cell*kAMPKInhibPhosByS6K*AMPK*pS6K;  // modifiers: pS6K
  R16b: pAMPKi => AMPK; Cell*kAMPKDephos*pAMPKi;
  R17fi: AMPK => pAMPK; Cell*kAMPKActByCaMKK2*AMPK*CaMKK2a;  // modifiers: CaMKK2a
  R17fii: AMPK => pAMPK; Cell*kAMPKActByLKB1*AMPK*LKB1a;  // modifiers: LKB1a
  R17bi: pAMPK => AMPK; Cell*kAMPKInact*pAMPK;
  R18f: CaMKK2 => CaMKK2a; Cell*kCaMKK2Act*CaMKK2*Ca2;  // modifiers: Ca2
  R18b: CaMKK2a => CaMKK2; Cell*kCaMKK2Inact*CaMKK2a;
  R19f: PKC => PKCa; Cell*kPKCAct*PKC*DAG;  // modifiers: DAG
  R19s: PKC => PKCa; Cell*kPKCActByPMA*PKC*PMA;
  R19b: PKCa => PKC; Cell*kPKCInact*PKCa;
  R20fi: LKB1 => LKB1a; Cell*kLKB1Act*LKB1*AMP;
  R20fii: LKB1 => LKB1a; Cell*kLKB1Act*LKB1*ADP;
  R20b: LKB1a => LKB1; Cell*kLKB1Inact*LKB1a*AA;
  R22f: RTK => pRTK; Cell*kTKRBindEGF*RTK*EGF;
  R22b: pRTK => RTK; Cell*kTKRUnbindEGF*pRTK;
  R23f: pRTK + Sos => pRTKa; Cell*kTKRBindSOS*pRTK*Sos;
  R23b: pRTKa => pRTK + Sos; Cell*kTKRUnbindSOS*pRTKa;
  R24f: Sos => pSos; Cell*kSOSPhos*Sos*pErk;  // modifiers: pErk
  R24b: pSos => Sos; Cell*kSOSDephos*pSos;
  R25fi: RasGDP => RasGTP; Cell*kRasLoadByRTK*RasGDP*pRTKa;  // modifiers: pRTKa
  R25fii: RasGDP => RasGTP; Cell*kRasLoadByPKC*RasGDP*PKCa;  // modifiers: PKCa
  R25b: RasGTP => RasGDP; Cell*kRasUnload*RasGTP;
  R26f: Raf + RasGTP => pRaf + RasGDP; Cell*kRafPhos*Raf*RasGTP;
  R26b: pRaf => Raf; Cell*kRafDephosByAkt*pRaf*pAkt;  // modifiers: pAkt
  R27f: Mek => pMek; Cell*kMekPhos*Mek*pRaf;  // modifiers: pRaf
  R27b: pMek => Mek; Cell*kMekDephos*pMek;
  R28f: Erk => pErk; Cell*kErkPhos*Erk*pMek;  // modifiers: pMek
  R28b: pErk => Erk; Cell*kErkDephos*pErk*DUSP;  // modifiers: DUSP
  R29f: Mek => Meki; Cell*kMekBindAzd*Mek*AZD;
  R29b: Meki => Mek; Cell*kMekUnbindAzd*Meki;
  R30In: => DUSPmRNA; Cell*kDUSPmRNAIn*pErk;  // modifiers: pErk
  R30OUT: DUSPmRNA => ; Cell*kDUSPmRNAOut*DUSPmRNA;
  R31In: => DUSP; Cell*kDUSPIn*DUSPmRNA;  // modifiers: DUSPmRNA
  R31OUT: DUSP => ; Cell*kDUSPOut*DUSP;
  R32f: PLCeps => pPLCeps; Cell*kPLCPhosBasal*PLCeps*RasGTP;  // modifiers: RasGTP
  R32b: pPLCeps => PLCeps; Cell*kPLCDephos*pPLCeps;
  R33f: PIP2 => IP3 + DAG; Cell*kPIP2Break*PIP2*pPLCeps;  // modifiers: pPLCeps
  R33b: IP3 + DAG => PIP2; Cell*kPIP2form*IP3*DAG;
  R34f: IP3 + IpR => IpRa; Cell*kIP3BindIpR*IP3*IpR;
  R34b: IpRa => IP3 + IpR; Cell*kIP3UnbindIpR*IpRa;
  R35f: => Ca2; Cell*kCa2In*IpRa;  // modifiers: IpRa
  R35b: Ca2 => ; Cell*kCa2Out*Ca2;
end
