// SBML level 3 version 1

model ModelWithMTOR()

  // Compartments:
  compartment Cell = 1;

  // Species:
  species Akt in Cell = 10;
  species pAkt in Cell = 0;
  species TSC2 in Cell = 10;
  species pTSC2 in Cell = 0;
  species mTORC1 in Cell = 10;
  species pmTORC1 in Cell = 0;
  species S6K in Cell = 10;
  species pS6K in Cell = 0;
  species FourEBP1 in Cell = 10;
  species pFourEBP1 in Cell = 0;

  // Parameters:
  Insulin = 0;
  kAktPhos = 0.1;
  kAktDephos = 0.1;
  kTSC2Phos = 0.1;
  kTSC2Dephos = 0.1;
  kmTORC1Phos = 0.1;
  kmTORC1Dephos = 0.1;
  kS6KPhos = 0.1;
  kS6KDephos = 0.1;
  k4EBP1Phos = 0.1;
  k4EBP1Dephos = 0.1;

  // Reactions:
  R1f: Akt => pAkt; Cell*kAktPhos*Akt*Insulin;
  R1b: pAkt => Akt; Cell*kAktDephos*pAkt;
  R2f: TSC2 => pTSC2; Cell*kTSC2Phos*TSC2*pAkt;  // modifiers: pAkt
  R2b: pTSC2 => TSC2; Cell*kTSC2Dephos*pTSC2;
  R3f: mTORC1 => pmTORC1; Cell*kmTORC1Phos*mTORC1;
  R3b: pmTORC1 => mTORC1; Cell*kmTORC1Dephos*pmTORC1*TSC2;  // modifiers: TSC2
  R4f: S6K => pS6K; Cell*kS6KPhos*S6K*pmTORC1;  // modifiers: pmTORC1
  R4b: pS6K => S6K; Cell*kS6KDephos*pS6K;
  R5f: FourEBP1 => pFourEBP1; Cell*k4EBP1Phos*FourEBP1*pmTORC1;  // modifiers: pmTORC1
  R5b: pFourEBP1 => FourEBP1; Cell*k4EBP1Dephos*FourEBP1;
end
