// SBML level 3 version 1

function MM(km, Vmax, S)
  Vmax*S/(km + S);
end

function MMWithKcat(km, kcat, S, E)
  kcat*E*S/(km + S);
end

function NonCompetitiveInhibition(km, ki, Vmax, n, I, S)
  Vmax*S/((km + S)*(1 + (I/ki)^n));
end

function NonCompetitiveInhibitionWithKcat(km, ki, kcat, E, n, I, S)
  kcat*E*S/((km + S)*(1 + (I/ki)^n));
end

function NonCompetitiveInhibitionWithKcatAndExtraActivator(km, ki, kcat, E1, E2, n, I, S)
  kcat*E1*E2*S/((km + S)*(1 + (I/ki)^n));
end

function MA1(k, S)
  k*S;
end

function MA2(k, S1, S2)
  k*S1*S2;
end

function MA1Mod(k, S, M)
  k*S*M;
end

function MA2Mod(k, S1, S2, M)
  k*S1*S2*M;
end

function CompetitiveInhibitionWithKcat(km, ki, kcat, E, I, S)
  kcat*E*S/(km + S + km*I/ki);
end

function CompetitiveInhibition(Vmax, km, ki, I, S)
  Vmax*S/(km + S + km*I/ki);
end

function Hill(km, kcat, L, S, h)
  kcat*L*(S/km)^h/1 + (S/km)^h;
end

model SimpleAktModel()

  // Compartments:
  compartment default_compartment = 1;
  compartment Cell = 1;

  // Species:
  species $IRS1 in Cell;
  species IRS1pS636_639 in Cell = 0.861333;
  species $Akt in Cell;
  species AktpT308 in Cell = 0.486243;
  species $TSC2 in Cell;
  species TSC2pT1462 in Cell = 0.644957;
  species $PRAS40 in Cell;
  species PRAS40pT246 in Cell = 0.38719;
  species $S6K in Cell;
  species S6KpT389 in Cell = 0.395656;
  species $FourEBP1 in Cell;
  species FourE_BP1pT37_46 in Cell = 0.488169;
  species $PI3K in Cell;
  species pPI3K in Cell;
  species S6KpS6228 in default_compartment;

  // Parameters:
  Erk_pT202_Y204 = 0.115661;
  Feedback = 0;
  Insulin = 1;
  offset_amount = 5;
  _PI3K_tot = 5;
  _pPI3K = 0.1;
  kFeedbackOut = 0.01326991;
  kFeedbackIn = 1092.52;
  _kFourEBP1Dephos = 0.04760717;
  _kS6KDephos = 0.02513594;
  _kPras40Dephos = 0.1001194;
  _kFourEBP1Phos_km = 82.73582;
  _kS6KT389Phos_km = 9711.279;
  _kPras40PhosByAkt_km = 2684.754;
  _kS6KT389Phos_kcat = 350.115286;
  _kFourEBP1Phos_kcat = 4.768586;
  _kPras40PhosByAkt_kcat = 286.5648;
  _kAktDephos = 403.462;
  _kAktPhos_km = 23.32;
  _kAktPhos_kcat = 4887.04;
  _kIRS1Phos_km = 4469.349;
  _kIRS1Dephos_km = 1732.05;
  _kIRS1Dephos_kcat = 31.97748;
  _kIRS1Phos_kcat = 91.2525;
  _kTSC2Phos_kcat = 1285.13;
  _kTSC2Phos_km = 9527.75;
  _kTSC2Phos_ki = 1621.49;
  _kTSC2Dephos_vmax = 1136.83;
  _kTSC2Dephos_km = 7776.66;
  PI3K_tot = ;
  _kPI3KPhos_km = ;
  _kPI3KPhos_kcat = ;
  _kPI3KDephos = ;
  _kS6KPhosS6228_km = ;
  _kS6KPhosS6228_kcat = ;
  _kS6KDephosS6228 = ;
  _kTSC2Dephos = ;

  // Assignment rules:
  IRS1 := IRS1_tot - IRS1pS636_639;
  Akt := Akt_tot - AktpT308;
  TSC2 := TSC2_tot - TSC2pT1462;
  PRAS40 := PRAS40_tot - PRAS40pT246;
  S6K := S6K_tot - S6KpT389;
  FourEBP1 := FourEBP1_tot - FourE_BP1pT37_46;
  PI3K := PI3K_tot - pPI3K;
  Erk := Erk_tot - Erk_pT202_Y204_obs;
  FourEBP1_tot := 0.458272 + offset_amount;
  Akt_tot := 1.241997 + offset_amount;
  IRS1_tot := 1.925974 + offset_amount;
  TSC2_tot := 1.136033 + offset_amount;
  PRAS40_tot := 0.981968 + offset_amount;
  S6K_tot := 1.330735 + offset_amount;
  Erk_tot := 1.305048 + offset_amount;
  IRS1pS636_639_obs := IRS1pS636_639;
  AktpT308_obs := AktpT308;
  TSC2pT1462_obs := TSC2pT1462;
  PRAS40pT246_obs := PRAS40pT246;
  S6KpT389_obs := S6KpT389;
  FourE_BP1pT37_46_obs := FourE_BP1pT37_46;
  Erk_pT202_Y204_obs := Erk_pT202_Y204;

  // Reactions:
  R1f: $IRS1 => IRS1pS636_639; Cell*MMWithKcat(_kIRS1Phos_km, _kIRS1Phos_kcat, IRS1, S6KpT389);  // modifiers: S6KpT389
  R1b: IRS1pS636_639 => $IRS1; Cell*MMWithKcat(_kIRS1Dephos_km, _kIRS1Dephos_kcat, IRS1pS636_639, Insulin);
  R2f: $PI3K => pPI3K; Cell*MMWithKcat(_kPI3KPhos_km, _kPI3KPhos_kcat, PI3K, IRS1);  // modifiers: IRS1
  R2b: pPI3K => $PI3K; Cell*_kPI3KDephos*pPI3K;
  R3f: $S6K => S6KpS6228; Cell*MMWithKcat(_kS6KPhosS6228_km, _kS6KPhosS6228_kcat, S6K, pPI3K);  // modifiers: pPI3K
  R3b: S6KpS6228 => $S6K; Cell*_kS6KDephosS6228*S6KpS6228;
  R4f: $Akt => AktpT308; Cell*MMWithKcat(_kAktPhos_km, _kAktPhos_kcat, Akt, pPI3K);  // modifiers: pPI3K
  R4b: AktpT308 => $Akt; Cell*_kAktDephos*AktpT308*Erk_pT202_Y204;
  R5f: $TSC2 => TSC2pT1462; Cell*NonCompetitiveInhibitionWithKcat(_kTSC2Phos_km, _kTSC2Phos_ki, _kTSC2Phos_kcat, AktpT308, 1, Erk_pT202_Y204, TSC2);  // modifiers: AktpT308
  R5b: TSC2pT1462 => $TSC2; Cell*_kTSC2Dephos*TSC2pT1462;
  R6f: $PRAS40 => PRAS40pT246; Cell*MMWithKcat(_kPras40PhosByAkt_km, _kPras40PhosByAkt_kcat, PRAS40, AktpT308);  // modifiers: AktpT308
  R6b: PRAS40pT246 => $PRAS40; Cell*_kPras40Dephos*PRAS40pT246;
  R7f: $FourEBP1 => FourE_BP1pT37_46; Cell*MMWithKcat(_kFourEBP1Phos_km, _kFourEBP1Phos_kcat, FourEBP1, TSC2);  // modifiers: TSC2
  R7b: FourE_BP1pT37_46 => $FourEBP1; Cell*_kFourEBP1Dephos*FourE_BP1pT37_46;
  R8f: $S6K => S6KpT389; Cell*MMWithKcat(_kS6KT389Phos_km, _kS6KT389Phos_kcat, S6K, TSC2);  // modifiers: TSC2
  R8b: S6KpT389 => $S6K; Cell*_kS6KDephos*S6KpT389;
end
